<?xml version="1.0" encoding="UTF-8"?>

<channelml xmlns="http://morphml.org/channelml/schema"
    xmlns:xsi="http://www.w3.org/2001/XMLSchema-instance"
    xmlns:meta="http://morphml.org/metadata/schema"
    xsi:schemaLocation="http://morphml.org/channelml/schema  http://www.neuroml.org/NeuroMLValidator/NeuroMLFiles/Schemata/v1.8.1/Level2/ChannelML_v1.8.1.xsd"
    units="Physiological Units">

    <meta:notes>ChannelML file containing a single Channel description from Solinas et al 2007</meta:notes>

    <channel_type name="NaP_CML" density="yes">

       <status value="stable">
            <meta:comment>Changed table values -100mV->100mV; see https://github.com/OpenSourceBrain/SolinasEtAl-GolgiCell/issues/4</meta:comment>
            <meta:contributor>
                <meta:name>Matteo Farinella</meta:name>
            </meta:contributor>
            <meta:contributor>
                <meta:name>Padraig Gleeson</meta:name>
            </meta:contributor>
        </status>

        <meta:notes>Persistent Na+ channel</meta:notes>

	 <meta:authorList>
             <meta:modelAuthor>
                <meta:name>E.DAngelo</meta:name>
                <meta:comment>Cited implementer according to the original .mod file. Note from original mod file: Last revised: 8.5.2000</meta:comment>
            </meta:modelAuthor>

            <meta:modelAuthor>
                <meta:name>T.Nieus</meta:name>
                <meta:comment>Cited implementer according to the original .mod file. Note from original mod file: Last revised: 8.5.2000</meta:comment>
            </meta:modelAuthor>

            <meta:modelAuthor>
                <meta:name>A. Fontana</meta:name>
                <meta:comment>Cited implementer according to the original .mod file. Note from original mod file: Last revised: 8.5.2000</meta:comment>
            </meta:modelAuthor>

            <meta:modelTranslator>
                <meta:name>Matteo Farinella</meta:name>
                <meta:institution>UCL</meta:institution>
                <meta:email>m.farinella - at - ucl.ac.uk</meta:email>
            </meta:modelTranslator>

            <meta:modelTranslator>
                <meta:name>Padraig Gleeson</meta:name>
                <meta:institution>UCL</meta:institution>
                <meta:email>p.gleeson - at - ucl.ac.uk</meta:email>
            </meta:modelTranslator>

        </meta:authorList>

         <meta:publication>
            <meta:fullTitle>Solinas S, Forti L, Cesana E, Mapelli J, De Schutter E, D'Angelo E. (2007) Computational reconstruction of pacemaking and intrinsic electroresponsiveness in cerebellar Golgi cells.  Front Cell Neurosci. 2007;1:2.</meta:fullTitle>
            <meta:pubmedRef>http://www.ncbi.nlm.nih.gov/pubmed/18946520</meta:pubmedRef>
        </meta:publication>

        <meta:neuronDBref>
            <meta:modelName>Na channels</meta:modelName>
            <meta:uri>http://senselab.med.yale.edu/senselab/NeuronDB/channelGene2.htm#table2</meta:uri>
        </meta:neuronDBref>

        <meta:modelDBref>
            <meta:modelName>Cerebellar Golgi cell (Solinas et al. 2007a, 2007b)</meta:modelName>
            <meta:uri>http://senselab.med.yale.edu/modeldb/ShowModel.asp?model=112685</meta:uri>
        </meta:modelDBref>

	        <current_voltage_relation cond_law="ohmic" ion="na" default_gmax="0.19" default_erev="87.39">

	            <q10_settings q10_factor="3" experimental_temp="30"/>

	                <!--
	                Aalpha_m 	= -0.91 (/mV-ms)
			Kalpha_m 	= -5 (mV)
			V0alpha_m 	= -40 (mV)

			Abeta_m 	= 0.62 (/mV-ms)
			Kbeta_m 	= 5 (mV)
			V0beta_m 	= -40 (mV)

			V0_minf 	= -43 (mV)
			B_minf 		= 5 (mV)

			alp_m = tcorr * Aalpha_m*linoid(v-V0alpha_m, Kalpha_m)

			bet_m = tcorr * Abeta_m*linoid(v-V0beta_m, Kbeta_m)

						FUNCTION linoid(x (mV),y (mV)) (mV) {
						        if (fabs(x/y) < 1e-6) {
						                linoid = y*(1 - x/y/2)
						        }else{
						                linoid = x/(exp(x/y) - 1)
						        }

			alp_m = Aalpha_m * x/(exp(x/y) - 1)

			alp_m = Aalpha_m * (v-V0alpha_m)/(exp((v-V0alpha_m)/Kalpha_m) - 1)

			alp_m = -(Aalpha_m*-Kalpha_m) * ((v-V0alpha_m)/-Kalpha_m) / (1 - exp(-(v-V0alpha_m)/-Kalpha_m))

			alpha =  A * ((v-V1/2)/B)  / (1 - exp(-(v-V1/2)/B))  (exp_linear)

			A= A/5 for tcorr

	                -->

            <gate name="m" instances="1">
                <closed_state id="m0"/>
                <open_state id="m"/>

                <transition name="alpha" from="m0" to="m" expr_form="exp_linear" rate="0.91" scale="5" midpoint="-40"/>
                <transition name="beta" from="m" to="m0" expr_form="exp_linear" rate="0.62" scale="-5" midpoint="-40"/>
                <steady_state name="inf" from="m0" to="m" expr_form="generic" expr="1/(1+(exp (-(v+43)/5)))"/>
	    </gate>

        </current_voltage_relation>

	<impl_prefs>
	    <table_settings max_v="100" min_v="-100" table_divisions="20000"/>
	</impl_prefs>

    </channel_type>
</channelml>
