<?xml version="1.0" encoding="ISO-8859-1"?>
<neuroml xmlns="http://www.neuroml.org/schema/neuroml2" xmlns:xsi="http://www.w3.org/2001/XMLSchema-instance" xsi:schemaLocation="http://www.neuroml.org/schema/neuroml2 https://raw.github.com/NeuroML/NeuroML2/development/Schemas/NeuroML2/NeuroML_v2beta4.xsd" id="Golgi_CALC_ca2_CML">

    <notes>Internal calcium concentration due to calcium currents and pump from Solinas et al 2007</notes>

    <decayingPoolConcentrationModel id="Golgi_CALC_ca2_CML" restingConc="5e-11mol_per_cm3" decayConstant="0.769231ms" ion="ca2" shellThickness="2.0304e-5cm"/>

</neuroml>
